** written by FreeCAD inp file writer for CalculiX,Abaqus meshes
** highest dimension mesh elements only.

** Nodes
*Node, NSET=Nall
1, 910, 660, 90
2, 910, -660, 90
3, -910, 660, 90
4, -910, -660, 90
5, 910, 660, 10
6, 910, -660, 10
7, -910, 660, 10
8, -910, -660, 10
9, 990, -740, 90
10, 990, -740, 10
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

** Volume elements
*Element, TYPE=C3D10, ELSET=Evolumes
1165, 26, 7, 55, 29, 1581, 780, 1583, 631, 1582, 1584
1166, 11, 36, 300, 35, 1585, 1317, 1586, 1587, 695, 715
1167, 232, 331, 158, 42, 1487, 1588, 1590, 1591, 1589, 1034
1168, 232, 56, 221, 42, 1592, 1593, 1210, 1591, 804, 1594
1169, 305, 130, 58, 223, 1595, 885, 1597, 1339, 1596, 1598
1170, 302, 55, 128, 220, 1599, 882, 1601, 1359, 1600, 1602
1171, 26, 7, 3, 55, 1581, 402, 1603, 1583, 780, 419
1172, 177, 30, 12, 343, 1604, 1605, 559, 1606, 1444, 1607
1173, 26, 7, 102, 3, 1581, 474, 1608, 1603, 402, 849
1174, 183, 349, 102, 182, 1609, 1610, 1011, 565, 1611, 1010
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
** Define element set Eall
*ELSET, ELSET=Eall
Evolumes


***********************************************************
** Element sets for materials and FEM element type (solid, shell, beam, fluid)
** written by write_element_sets_material_and_femelement_type function
*ELSET,ELSET=MaterialSolidSolid
Evolumes

***********************************************************
** constraints fixed node sets
** written by write_node_sets_constraints_fixed function
** ConstraintFixed
*NSET,NSET=ConstraintFixed
33,
34,
37,
38,
322,
323,
324,
325,
326,
327,
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
***********************************************************
** constraints displacement node sets
** written by write_node_sets_constraints_displacement function
** ConstraintDisplacement
*NSET,NSET=ConstraintDisplacement
17,
18,
19,
20,
184,
185,
186,
187,
569,
570,
571,
572,
573,
574,
575,
576,
1114,
1115,
1116,
1117,
1118,

***********************************************************
** Materials
** written by write_materials function
** Young's modulus unit is MPa = N/mm2
** Density's unit is t/mm^3
** FreeCAD material name: Steel-Generic
** MaterialSolid
*MATERIAL, NAME=MaterialSolid
*ELASTIC
200000, 0.300
*DENSITY
7.900e-09

***********************************************************
** Sections
** written by write_femelementsets function
*SOLID SECTION, ELSET=MaterialSolidSolid, MATERIAL=MaterialSolid

***********************************************************
** At least one step is needed to run an CalculiX analysis of FreeCAD
** written by write_step_begin function
*STEP,INC=1000000
*Static
1E-8,1,1E-12,0.005
*RESTART,WRITE,FREQUENCY=1


***********************************************************
** Fixed Constraints
** written by write_constraints_fixed function
** ConstraintFixed
*BOUNDARY
ConstraintFixed,1
ConstraintFixed,2
ConstraintFixed,3


***********************************************************
** Displacement constraint applied
** written by write_constraints_displacement function
** ConstraintDisplacement
*BOUNDARY
ConstraintDisplacement,1,1,-10


***********************************************************
** Self weight Constraint
** written by write_constraints_selfweight function
** ConstraintSelfWeight
*DLOAD
Eall,GRAV,9806,-1,0.0,0


***********************************************************
** Outputs --> frd file
** written by write_outputs_types function
*NODE FILE
U
*EL FILE
S, E
** outputs --> dat file
** reaction forces for Constraint fixed
*NODE PRINT, NSET=ConstraintDisplacement, Totals=Yes
RF

***********************************************************
** written by write_step_end function
*END STEP
*STEP
*FREQUENCY, SOLVER=MATRIXSTORAGE
*END STEP
