*RESTART, READ
*STEP, INC=1000000
*Static
1e-05,1.0,1e-08,0.1
*RESTART, WRITE
*BOUNDARY
ConstraintDisplacement,1,1,0.24036845281843855
*BOUNDARY
ConstraintDisplacement,3,3,0.02920117427172153
*BOUNDARY
ConstraintFixed,1,3,0
*NODE FILE
U
*NODE PRINT, NSET=ConstraintDisplacement,Totals=Only
RF
*NODE PRINT, NSET=ConstraintFixed,Totals=Only
RF
*END STEP
