*RESTART, READ
*STEP, INC=1000000
*Static
1e-05,1,0.001,0.1
*RESTART, WRITE
*BOUNDARY
ConstraintDisplacement,1,1,-0.020908389511507974
*BOUNDARY
ConstraintDisplacement,3,3,-1.3009737746380265
*BOUNDARY
ConstraintFixed,1,3,0
*NODE FILE
U
*NODE PRINT, NSET=ConstraintDisplacement,Totals=Only
RF
*NODE PRINT, NSET=ConstraintFixed,Totals=Only
RF
*END STEP
