** written by FreeCAD inp file writer for CalculiX,Abaqus meshes
** highest dimension mesh elements only.

** Nodes
*Node, NSET=Nall
1, 910, 660, 90
2, 910, -660, 90
3, -910, 660, 90
4, -910, -660, 90
5, 910, 660, 10
6, 910, -660, 10
7, -910, 660, 10
8, -910, -660, 10
9, 990, -740, 90
10, 990, -740, 10
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

** Volume elements
*Element, TYPE=C3D10, ELSET=Evolumes
1163, 154, 331, 227, 330, 1574, 1412, 1575, 1576, 745, 1413
1164, 218, 226, 57, 219, 1188, 1577, 1578, 611, 1189, 1579
1165, 333, 129, 305, 304, 1580, 1581, 1555, 1554, 1582, 716
1166, 332, 155, 303, 331, 1583, 1584, 1552, 746, 1585, 1551
1167, 293, 294, 119, 285, 704, 1586, 1587, 1311, 1312, 1588
1168, 332, 128, 304, 303, 1589, 1590, 1553, 1552, 1591, 715
1169, 53, 52, 236, 67, 412, 1592, 1593, 789, 794, 1594
1170, 355, 277, 276, 72, 1442, 683, 1445, 1596, 1595, 1597
1171, 283, 282, 269, 108, 692, 1460, 1459, 1599, 1598, 1600
1172, 21, 123, 4, 94, 1601, 896, 1602, 1603, 893, 461
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
** Define element set Eall
*ELSET, ELSET=Eall
Evolumes


***********************************************************
** Element sets for materials and FEM element type (solid, shell, beam, fluid)
** written by write_element_sets_material_and_femelement_type function
*ELSET,ELSET=MaterialSolidSolid
Evolumes

***********************************************************
** constraints fixed node sets
** written by write_node_sets_constraints_fixed function
** ConstraintFixed
*NSET,NSET=ConstraintFixed
33,
34,
37,
38,
321,
322,
323,
324,
325,
326,
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
***********************************************************
** constraints displacement node sets
** written by write_node_sets_constraints_displacement function
** ConstraintDisplacement
*NSET,NSET=ConstraintDisplacement
18,
19,
25,
27,
182,
183,
184,
185,
186,
187,
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
***********************************************************
** Materials
** written by write_materials function
** Young's modulus unit is MPa = N/mm2
** Density's unit is t/mm^3
** FreeCAD material name: Steel-Generic
** MaterialSolid
*MATERIAL, NAME=MaterialSolid
*ELASTIC
200000, 0.300
*DENSITY
7.900e-09

***********************************************************
** Sections
** written by write_femelementsets function
*SOLID SECTION, ELSET=MaterialSolidSolid, MATERIAL=MaterialSolid

***********************************************************
** At least one step is needed to run an CalculiX analysis of FreeCAD
** written by write_step_begin function
*STEP
*FREQUENCY
10,0.0,1000000.0


***********************************************************
** Fixed Constraints
** written by write_constraints_fixed function
** ConstraintFixed
*BOUNDARY
ConstraintFixed,1
ConstraintFixed,2
ConstraintFixed,3


***********************************************************
** Displacement constraint applied
** written by write_constraints_displacement function
** ConstraintDisplacement
*BOUNDARY
ConstraintDisplacement,1,1,19.0


***********************************************************
** Outputs --> frd file
** written by write_outputs_types function
*NODE FILE
U
*EL FILE
S, E
** outputs --> dat file
** reaction forces for Constraint fixed
*NODE PRINT, NSET=ConstraintFixed, TOTALS=ONLY
RF


***********************************************************
** written by write_step_end function
*END STEP

***********************************************************
** CalculiX Input file
** written by write_footer function
**   written by    --> FreeCAD 0.19.24267 +148 (Git)
**   written on    --> Mon May 30 16:08:12 2022
**   file name     --> Test Frame.FCStd
**   analysis name --> Analysis
**
**
***********************************************************
**  About units:
**  See ccx manual, ccx does not know about any unit.
**  Golden rule: The user must make sure that the numbers he provides have consistent units.
**  The user is the FreeCAD calculix writer module ;-)
**
**  The unit system which is used at Guido Dhondt's company: mm, N, s, K
**  Since Length and Mass are connected by Force, if Length is mm the Mass is in t to get N
**  The following units are used to write to inp file:
**
**  Length: mm (this includes the mesh geometry)
**  Mass: t
**  TimeSpan: s
**  Temperature: K
**
**  This leads to:
**  Force: N
**  Pressure: N/mm^2
**  Density: t/mm^3
**  Gravity: mm/s^2
**  Thermal conductivity: t*mm/K/s^3 (same as W/m/K)
**  Specific Heat: mm^2/s^2/K (same as J/kg/K)
**
